# Højpasfilter
f_c := 9 kHz
R := 10 kΩ
1*kHz == 1/(2*π*R*C) solve, C → 1/(20*π*kHz*kΩ) = 15.9155 nF
3 kHz == 1/(2*π*R*C) solve, C → 1/(60*π*kHz*kΩ) = 5.30516 nF
C == 0.002*μF
# Laspasfilter
f_c := 11 kHz
C := 0.1 μF
R := 150 Ω
# Spændingsdeler
R_1 := 18 kΩ
U1 := 0.5 V
U2 := 5 V
U1 == U2*R_2/(R_1 + R_2) solve, R_2 → 2.0*kΩ
10 kHz = 10000 1/s
1 s/30000 = 33.3333 μs
